Simulations: Version=171
  Simulation WT
    Weather
      FileName=C:/Users/cmg3/Documents/GitHub/APSIMX_SeasonalCharacterization/met/loc_1.met
    Clock: Start=1989-01-01; End=1990-01-01
    Summary summaryfile
    Zone paddock: Area=1; Slope=0; AspectAngle=0; Altitude=50
      SurfaceOrganicMatter: InitialResidueName=soybean; InitialResidueType=soybean; InitialResidueMass=2000; InitialStandingFraction=0.2; InitialCPR=0; InitialCNR=20
      Fertiliser
      Plant maize: ResourceName=Maize
      Plant soybean: ResourceName=Soybean
      Folder Manager folder
        Manager Tillage on fixed date
          tillage_date = 20-mar
          surfaceommodule = SurfaceOrganicMatter
          tillage_type = disc
          tillage_depth = 150
          tillage_f_incorp = 0.4
```csharp
using Models.Soils;
using System;
using Models.Core;
using Models.PMF;
namespace Models
{
    [Serializable]
    [System.Xml.Serialization.XmlInclude(typeof(Model))]
    public class Script : Model
    {
        [Link] IClock Clock;

        [Description("Enter tillage date (dd-mmm) : ")]
        public string tillage_date { get; set; }

        [Description("Module used to apply the tillage : ")]
        public string surfaceommodule { get; set; }

        [Description("Tillage type : ")]
        public tillage_typeType tillage_type { get; set; }

        [Description("User_defined depth of seedbed preparation (mm) : ")]
        public string tillage_depth { get; set; }

        [Description("User_defined fraction of surface residues to incorporate (0-1): ")]
        public string tillage_f_incorp { get; set; }
        public enum tillage_typeType 
        {
            user_defined, chisel, disc, planter, burn, burn_90, graze, scarifier, rip, blade, tine
        }

        [EventSubscribe("DoManagement")]
        private void OnDoManagement(object sender, EventArgs e)
        {
            /*
                
         if (today = date('[tillage_date]') then
            if ('[tillage_type]' = 'user_defined') then
                '[surfaceommodule]' tillage type = [tillage_type], f_incorp = [tillage_f_incorp] (), tillage_depth = [tillage_depth]
            else
                '[surfaceommodule]' tillage type = [tillage_type]
            endif
            ready_to_till_pre_sow = 0
            till_day_pre_sow = 0
         endif
    
            */
        }
    }
}
```
        Manager Fertilise at sowing
          modulename = maize
          eventname = sowing
          fertmodule = fertiliser
          fert_amount_sow = 220
          fert_type_sow = urea_N
```csharp
using Models.Soils;
using System;
using Models.Core;
using Models.PMF;
namespace Models
{
    [Serializable]
    [System.Xml.Serialization.XmlInclude(typeof(Model))]
    public class Script : Model
    {
        [Link] IClock Clock;

        [Description("On which module should the event come from : ")]
        public string modulename { get; set; }

        [Description("On which event should fertiliser be applied : ")]
        public string eventname { get; set; }

        [Description("Module used to apply the fertiliser : ")]
        public string fertmodule { get; set; }

        [Description("Amount of starter fertiliser at sowing (kg/ha) : ")]
        public string fert_amount_sow { get; set; }

        [Description("Sowing fertiliser type : ")]
        public fert_type_sowType fert_type_sow { get; set; }
        public enum fert_type_sowType 
        {
            NO3_N, NH4_N, NH4NO3, urea_N, urea_no3, urea, nh4so4_n, rock_p, banded_p, broadcast_p
        }

        //[EventSubscribe("unknown")]
        //private void OnUnknown(object sender, EventArgs e)
        //{
            /*
                // ----- [modulename].[eventname] ----- 

        [fertmodule] apply amount = [fert_amount_sow] (kg/ha), depth = 50 (mm), type = [fert_type_sow]
            
            */
        //}
    }
}
```
        Manager Sow on a fixed date
          date =
          crop =
          density =
          depth =
          cultivar =
          _class =
          row_spacing =
```csharp
using Models.Soils;
using System;
using Models.Core;
using Models.PMF;
namespace Models
{
    [Serializable]
    [System.Xml.Serialization.XmlInclude(typeof(Model))]
    public class Script : Model
    {
        [Link] IClock Clock;

        [Description("Enter sowing date (dd-mmm) : ")]
        public string date { get; set; }

        [Description("Enter name of crop to sow : ")]
        public string crop { get; set; }

        [Description("Enter sowing density  (plants/m2) : ")]
        public string density { get; set; }

        [Description("Enter sowing depth  (mm) : ")]
        public string depth { get; set; }

        [Description("Enter cultivar : ")]
        [Display(Type = DisplayType.CultivarName)]
        public string cultivar { get; set; }

        [Description("Enter crop growth class : ")]
        public string _class { get; set; }

        [Description("Enter row spacing (mm) : ")]
        public string row_spacing { get; set; }

        [EventSubscribe("DoManagement")]
        private void OnDoManagement(object sender, EventArgs e)
        {
            /*
                
        if (today = date('[date]') then
              [crop] sow plants =[density], sowing_depth = [depth], cultivar = [cultivar], row_spacing = [row_spacing], crop_class = [class]
         endif
    
            */
        }
    }
}
```
        Manager Harvesting rule
          crop = maize
```csharp
using Models.Soils;
using System;
using Models.Core;
using Models.PMF;
namespace Models
{
    [Serializable]
    [System.Xml.Serialization.XmlInclude(typeof(Model))]
    public class Script : Model
    {
        [Link] IClock Clock;

        [Description("Enter name of crop to harvest when ripe : ")]
        public string crop { get; set; }

        [EventSubscribe("DoCalculations")]
        private void OnDoCalculations(object sender, EventArgs e)
        {
            /*
                
           if ([crop].StageName = 'harvest_ripe' or [crop].plant_status = 'dead') then
              [crop]  harvest
              [crop]  end_crop
           endif
        
            */
        }
    }
}
```
        Manager Harvesting rule1
          crop = soybean
          script: same as in WT.paddock.Manager folder.Harvesting rule
        Manager Empty manager
```csharp
using Models.Soils;
using System;
using Models.Core;
using Models.PMF;
namespace Models {
    [Serializable]
    [System.Xml.Serialization.XmlInclude(typeof(Model))]
    public class Script : Model {
        [Link] IClock Clock;
		/*
        [EventSubscribe("DoManagement")]
        private void OnDoManagement(object sender, EventArgs e) {
            corn_buac   = maize.yield * 0.0159/0.85;  // corn yield in bushels/acre @15% moisture  
            corn_kgha   = maize.yield / 0.85;  // corn yield @15% moisture 
 
            soy_buac   = soybean.yield * 0.0149/0.87;
            soy_kgha   = soybean.yield / 0.87; // soybeanyield @13% moisture  

            oc_20cm = (oc(1) + oc(2))*0.5;
            oc_40cm = (oc_20cm + oc(3))*0.5;
  
            n_uptake_kgha = n_total_uptake * 10;
            bbc_gradient = 1;
        }
        
        [EventSubscribe("DoCalculations")]
        private void OnDoCalculations(object sender, EventArgs e) {
            root_wt = fom_c() /0.4;
			root_cn = fom_c() /fom_n();
			n_deep = no3() + nh4();
			Y = paddock.soybean.yield +  paddock.maize.yield;
			leaf_num = leaf_no + LeafNo;
        }
        */
    }
}
```
      Report outputfile
        VariableNames:
          [Clock].Today
          [Clock].Today.Year as year
          [Clock].Today.Month as month
          [Clock].Today.Day as day
          [Phenology].CurrentStageName as StageName
          [Phenology].Stage as Stage
          [Phenology].LeafAppearance.LeafNumber as leaf_num
          [Weather].Rain
          [Weather].Radn
          [Weather].MaxT
          [Weather].MinT
        EventNames:
          [Clock].DoReport
          [Clock].DoReport
          [Clock].DoReport
      Soil Lamoure:2640928: SoilType=Lamoure:2640928; State=ND; Country=USA; ApsoilNumber=0; Latitude=46.8973; Longitude=-97.2124
        DataSource=SSURGO (https://sdmdataaccess.nrcs.usda.gov/) through R package soilDB, R package apsimx function ssurgo2sp. Timestamp 2024-02-02 14:24:48.756285
        Comments=cokey = 23993187 - acres percent = 75 - component percent = 75 - taxonomic classification name = Fine-silty, mixed, superactive, calcareous, frigid Cumulic Endoaquolls - drainage class = Poorly drained - elevation = 304 - slope = 1 - geomdesc = Talf
        Physical
          Thickness  ParticleSizeClay  ParticleSizeSand  ParticleSizeSilt  BD       AirDry     LL15       DUL       SAT       KS
          200        30                6.8               63.2              1.46434  0.0911577  0.182315   0.361041  0.447421  198.72
          200        30                6.8               63.2              1.46434  0.0911577  0.182315   0.361041  0.447421  198.72
          200        30                6.8               63.2              1.46434  0.0911577  0.182315   0.361041  0.447421  198.72
          200        30                6.8               63.2              1.46434  0.0911577  0.182315   0.361041  0.447421  198.72
          200        30                6.8               63.2              1.46707  0.1818484  0.1818484  0.360839  0.44639   198.72
          200        26                6.8               67.2              1.50323  0.159252   0.159252   0.347122  0.432744  604.8
          200        22                36.5              41.5              1.58865  0.134205   0.134205   0.270165  0.400511  604.8
          200        17                64.4              18.6              1.63291  0.100653   0.100653   0.184868  0.383808  604.8
          200        17                64.4              18.6              1.63291  0.100653   0.100653   0.184868  0.383808  604.8
          200        17                64.4              18.6              1.63291  0.100653   0.100653   0.184868  0.383808  604.8
          SoilCrop MaizeSoil
            LL=[0.182315, 0.182315, 0.182315, 0.182315, 0.1818484, 0.159252, 0.134205, 0.100653, 0.100653, 0.100653]
            KL=[0.06, 0.0491238, 0.0402192, 0.0329287, 0.0269597, 0.0220728, 0.0180717, 0.0147958, 0.0121138, 0.00991793]
            XF=[1, 1, 1, 1, 1, 1, 1, 1, 1, 1]
          SoilCrop SoybeanSoil: same as WT.paddock.Lamoure:2640928.Physical.MaizeSoil
          SoilCrop WheatSoil: same as WT.paddock.Lamoure:2640928.Physical.MaizeSoil
        WaterBalance SoilWater: SummerDate=1-jun; SummerU=9.05; SummerCona=4; WinterDate=1-nov; WinterU=9.05; WinterCona=4; DiffusConst=40; DiffusSlope=16; Salb=0.15; CN2Bare=78; CNRed=20; CNCov=0.8; PSIDul=-100; Thickness=[50, 50, 50, 50, 200, 200, 200, 200, 500, 500, 500]
          SWCON=[0.327, 0.327, 0.327, 0.327, 0.335, 0.35, 0.363, 0.373, 0.433, 0.48, 0.48]
        CERESSoilTemperature Temperature
        Solute NO3: Thickness=[50, 50, 50, 50, 200, 200, 200, 200, 500, 500, 500]; InitialValuesUnits=ppm; WaterTableConcentration=0; D0=0; DepthConstant=0; MaxDepthSoluteAccessible=0; RunoffEffectivenessAtMovingSolute=0; MaxEffectiveRunoff=0
          InitialValues=[4.92308, 4.92308, 4.92308, 4.92308, 1.20992, 0.984848, 0.61194, 0.278986, 0.0590604, 0.0154839, 0]
        Solute NH4: Thickness=[50, 50, 50, 50, 200, 200, 200, 200, 500, 500, 500]; InitialValuesUnits=ppm; WaterTableConcentration=0; D0=0; DepthConstant=0; MaxDepthSoluteAccessible=0; RunoffEffectivenessAtMovingSolute=0; MaxEffectiveRunoff=0
          InitialValues=[2.46154, 2.46154, 2.46154, 2.46154, 0.603053, 0.492424, 0.30597, 0.141304, 0.0295302, 0.00774194, 0]
        Solute Urea: Thickness=[50, 50, 50, 50, 200, 200, 200, 200, 500, 500, 500]; InitialValues=[0, 0, 0, 0, 0, 0, 0, 0, 0, 0, 0]; InitialValuesUnits=kg/ha; WaterTableConcentration=0; D0=0; DepthConstant=0; MaxDepthSoluteAccessible=0; RunoffEffectivenessAtMovingSolute=0; MaxEffectiveRunoff=0
        Organic: FOMCNRatio=45; CarbonUnits=Total
          Thickness  Carbon    SoilCNRatio  FBiom       FInert    FOM
          200        3.48837   12           0.04        0.8       150
          200        3.48837   12           0.0327492   0.80804   122.81
          200        3.48837   12           0.0268128   0.816161  100.548
          200        3.48837   12           0.0219525   0.824364  82.3217
          200        1.16279   12           0.0179732   0.832649  67.3993
          200        0.290698  12           0.0147152   0.841017  55.1819
          200        2.32558   12           0.0120478   0.849469  45.1791
          200        0.290698  12           0.00986388  0.858007  36.9895
          200        0.290698  12           0.00807586  0.86663   30.2845
          200        0.290698  12           0.00661196  0.875339  24.7948
        Chemical: PHUnits=Water
          Thickness  PH   NO3N      NH4N
          200        6.5  0.5       0.05
          200        6.5  0.495025  0.0495025
          200        6.5  0.490099  0.0490099
          200        6.5  0.485223  0.0485223
          200        6.5  0.480395  0.0480395
          200        6.5  0.475615  0.0475615
          200        6.5  0.470882  0.0470882
          200        6.5  0.466197  0.0466197
          200        6.5  0.461558  0.0461558
          200        6.5  0.456966  0.0456966
        Water: Thickness=[50, 50, 50, 50, 200, 200, 200, 200, 500, 500, 500]; InitialPAWmm=277; RelativeTo=LL15; FilledFromTop=false
          InitialValues=[0.34, 0.34, 0.34, 0.34, 0.34, 0.33, 0.32, 0.3, 0.25, 0.22, 0.22]
        Nutrient
      MicroClimate: a_interception=0; b_interception=1; c_interception=0; d_interception=0; SoilHeatFluxFraction=0; MinimumHeightDiffForNewLayer=0; NightInterceptionFraction=0; ReferenceHeight=2
    SoilArbitrator
  DataStore
