Simulations: Version=171
  Simulation
    Clock: Start=2005-01-01; End=2005-12-31
    Summary
    Weather
      FileName=C:/Users/cmg3/Documents/GitHub/APSIMX_SeasonalCharacterization/met/loc_2.met
    SoilArbitrator
    MicroClimate: a_interception=0; b_interception=1; c_interception=0; d_interception=0; SoilHeatFluxFraction=0.4; MinimumHeightDiffForNewLayer=0; NightInterceptionFraction=0.5; ReferenceHeight=2
    Zone Field: Area=1; Slope=0; AspectAngle=0; Altitude=50
      Fertiliser
      Soil Renshaw:2713022: SoilType=Renshaw:2713022; State=SD; Country=USA; ApsoilNumber=0; Latitude=44.9096; Longitude=-97.1539
        DataSource=SSURGO (https://sdmdataaccess.nrcs.usda.gov/) through R package soilDB, R package apsimx function ssurgo2sp. Timestamp 2024-02-12 18:06:10.286571
        Comments=cokey = 24698283 - acres percent = 55 - component percent = 55 - taxonomic classification name = Fine-loamy over sandy or sandy-skeletal, mixed, superactive, frigid Calcic Hapludolls - drainage class = Somewhat excessively drained - elevation = 430 - slope = 1 - geomdesc = Rise
        Physical
          Thickness  ParticleSizeClay  ParticleSizeSand  ParticleSizeSilt  BD       AirDry     LL15       DUL        SAT       KS
          200        21                42                37                1.60247  0.0637913  0.127583   0.253635   0.394293  792.288
          200        21                42                37                1.60247  0.0637913  0.127583   0.253635   0.394293  792.288
          200        18                45                37                1.61886  0.10936    0.10936    0.231717   0.388109  792.288
          200        5                 85                10                1.58067  0.0231376  0.0231376  0.0735986  0.402519  7926.336
          200        5                 85                10                1.58067  0.0231376  0.0231376  0.0735986  0.402519  7926.336
          200        5                 85                10                1.58067  0.0231376  0.0231376  0.0735986  0.402519  7926.336
          200        5                 85                10                1.58067  0.0231376  0.0231376  0.0735986  0.402519  7926.336
          200        5                 85                10                1.58067  0.0231376  0.0231376  0.0735986  0.402519  7926.336
          200        5                 85                10                1.58067  0.0231376  0.0231376  0.0735986  0.402519  7926.336
          200        5                 85                10                1.58067  0.0231376  0.0231376  0.0735986  0.402519  7926.336
          SoilCrop MaizeSoil
            LL=[0.127583, 0.127583, 0.10936, 0.0231376, 0.0231376, 0.0231376, 0.0231376, 0.0231376, 0.0231376, 0.0231376]
            KL=[0.06, 0.0491238, 0.0402192, 0.0329287, 0.0269597, 0.0220728, 0.0180717, 0.0147958, 0.0121138, 0.00991793]
            XF=[1, 1, 1, 1, 1, 1, 1, 1, 1, 1]
          SoilCrop SoybeanSoil: same as Simulation.Field.Renshaw:2713022.Physical.MaizeSoil
          SoilCrop WheatSoil: same as Simulation.Field.Renshaw:2713022.Physical.MaizeSoil
        WaterBalance SoilWater: SummerDate=1-Jun; SummerU=9.05; SummerCona=4; WinterDate=1-Nov; WinterU=9.05; WinterCona=4; DiffusConst=40; DiffusSlope=16; Salb=0.15; CN2Bare=78; CNRed=20; CNCov=0.8; PSIDul=-100; Thickness=[200, 200, 200, 200, 200, 200, 200, 200, 200, 200]
          SWCON=[0.358363, 0.358363, 0.404494, 0.817608, 0.817608, 0.817608, 0.817608, 0.817608, 0.817608, 0.817608]
        Organic: FOMCNRatio=40; CarbonUnits=Total
          Thickness  Carbon    SoilCNRatio  FBiom       FInert    FOM
          200        1.45349   12           0.04        0.8       150
          200        1.45349   12           0.0327492   0.80804   122.81
          200        0.581395  12           0.0268128   0.816161  100.548
          200        0.001     12           0.0219525   0.824364  82.3217
          200        0.001     12           0.0179732   0.832649  67.3993
          200        0.001     12           0.0147152   0.841017  55.1819
          200        0.001     12           0.0120478   0.849469  45.1791
          200        0.001     12           0.00986388  0.858007  36.9895
          200        0.001     12           0.00807586  0.86663   30.2845
          200        0.001     12           0.00661196  0.875339  24.7948
        Chemical: Thickness=[200, 200, 200, 200, 200, 200, 200, 200, 200, 200]; PH=[6.5, 6.5, 6.5, 6.5, 6.5, 6.5, 6.5, 6.5, 6.5, 6.5]; PHUnits=Water
        Water: Thickness=[200, 200, 200, 200, 200, 200, 200, 200, 200, 200]; InitialPAWmm=361.05; RelativeTo=LL15; FilledFromTop=false
          InitialValues=[0.253635, 0.253635, 0.231717, 0.0735986, 0.0735986, 0.0735986, 0.0735986, 0.0735986, 0.0735986, 0.0735986]
        CERESSoilTemperature Temperature
        Nutrient
        Solute NO3: InitialValues=[1, 1, 1, 1, 1, 1, 1]; InitialValuesUnits=ppm; WaterTableConcentration=0; D0=0; DepthConstant=0; MaxDepthSoluteAccessible=0; RunoffEffectivenessAtMovingSolute=0; MaxEffectiveRunoff=0
          Thickness  NO3N      NH4N
          200        0.5       0.05
          200        0.495025  0.0495025
          200        0.490099  0.0490099
          200        0.485223  0.0485223
          200        0.480395  0.0480395
          200        0.475615  0.0475615
          200        0.470882  0.0470882
          200        0.466197  0.0466197
          200        0.461558  0.0461558
          200        0.456966  0.0456966
        Solute NH4: Thickness=[150, 150, 300, 300, 300, 300, 300]; InitialValues=[0.1, 0.1, 0.1, 0.1, 0.1, 0.1, 0.1]; InitialValuesUnits=ppm; WaterTableConcentration=0; D0=0; DepthConstant=0; MaxDepthSoluteAccessible=0; RunoffEffectivenessAtMovingSolute=0; MaxEffectiveRunoff=0
        Solute Urea: Thickness=[150, 150, 300, 300, 300, 300, 300]; InitialValues=[0, 0, 0, 0, 0, 0, 0]; InitialValuesUnits=kg/ha; WaterTableConcentration=0; D0=0; DepthConstant=0; MaxDepthSoluteAccessible=0; RunoffEffectivenessAtMovingSolute=0; MaxEffectiveRunoff=0
      Plant Soybean
      SurfaceOrganicMatter: InitialResidueName=maize; InitialResidueType=maize; InitialResidueMass=100; InitialStandingFraction=0; InitialCPR=0; InitialCNR=55
      Manager Fertilise at sowing
        Crop = [Soybean]
        FertiliserType = UreaN
        Amount = 10
```csharp
using Models.Soils;
using System;
using System.Linq;
using Models.Core;
using Models.PMF;
namespace Models
{
    [Serializable]
    public class Script : Model
    {
        [Link] Clock Clock;
        [Link] Fertiliser Fertiliser;
        
        [Description("Crop to be fertilised")]
        public IPlant Crop { get; set; }

        [Description("Type of fertiliser to apply? ")] 
        public Fertiliser.Types FertiliserType { get; set; }
    
        [Description("Amount of fertiliser to be applied (kg/ha)")]
        public double Amount { get; set; }
        
        [EventSubscribe("Sowing")]
        private void OnSowing(object sender, EventArgs e)
        {
            Model crop = sender as Model;
            if (Crop != null && crop.Name.ToLower() == (Crop as IModel).Name.ToLower())
                Fertiliser.Apply(Amount: Amount, Type: FertiliserType);
        }
    }
}
```
      Manager Harvest
        Crop = [Soybean]
```csharp
using APSIM.Shared.Utilities;
using Models.Utilities;
using Models.Soils;
using Models.PMF;
using Models.Core;
using System;
using System.Linq;

namespace Models
{
    [Serializable] 
    public class Script : Model
    {
        [Description("Crop")]
        public IPlant Crop { get; set; }
        
        [EventSubscribe("DoManagement")]
        private void OnDoManagement(object sender, EventArgs e)
        {
            if (Crop.IsReadyForHarvesting)
            {
                Crop.Harvest();
                Crop.EndCrop();
            }
        }
    }
}
```
      Manager Sow on a fixed date
        Crop = [Soybean]
        SowDate = 25-may
        CultivarName = Generic_MG0
        SowingDepth = 50
        RowSpacing = 750
        Population = 6
```csharp
using APSIM.Shared.Utilities;
using Models.Utilities;
using Models.Soils;
using Models.PMF;
using Models.Core;
using System;
using System.Linq;

namespace Models
{
    [Serializable]
    public class Script : Model
    {
        [Link] Clock Clock;
        [Link] Fertiliser Fertiliser;
        [Link] Summary Summary;
        [Link] Soil Soil;
        
        [Description("Crop")]
        public IPlant Crop { get; set; }

        [Description("Sowing date (d-mmm)")]
        public string SowDate { get; set; }

        [Display(Type = DisplayType.CultivarName)]
        [Description("Cultivar to be sown")]
        public string CultivarName { get; set; }

        [Description("Sowing depth (mm)")]
        public double SowingDepth { get; set; }

        [Description("Row spacing (mm)")]
        public double RowSpacing { get; set; }

        [Description("Plant population (/m2)")]
        public double Population { get; set; }

        [EventSubscribe("DoManagement")]
        private void OnDoManagement(object sender, EventArgs e)
        {
            if (DateUtilities.WithinDates(SowDate, Clock.Today, SowDate))
            {
                Crop.Sow(population: Population, cultivar: CultivarName, depth: SowingDepth, rowSpacing: RowSpacing);    
            }
        }
    }
}
```
      Manager Tillage on a fixed date
        TillageDate = 20-mar
        Fraction = 0.5
        Depth = 0
```csharp
using Models.Soils;
using System;
using System.Linq;
using Models.Core;
using Models.PMF;
using APSIM.Shared.Utilities;
using Models.Surface;

namespace Models
{
    [Serializable]
    public class Script : Model
    {
        [Link] Clock Clock;
        [Link] SurfaceOrganicMatter SOM;
        
        [Description("Tillage Date")]
        public string TillageDate { get; set; }
        
        [Description("Fraction of Residues To Incorporate (0-1)")]
        public double Fraction { get; set; }

        [Description("Depth of Tillage (mm)")]
        public double Depth { get; set; }

        [EventSubscribe("DoManagement")]
        private void OnDoManagement(object sender, EventArgs e)
        {
            if (DateUtilities.WithinDates(TillageDate, Clock.Today, TillageDate))
                SOM.Incorporate(Fraction, Depth);
        }
    }
}
```
      Report: EventNames=[Clock].DoReport
        VariableNames:
          [Clock].Today as Date
          [Clock].Today.Year as Year
          [Clock].Today.Month as Month
          [Clock].Today.Day as Day
          [Phenology].CurrentStageName as StageName
          [Phenology].Stage as Stage
          [Weather].Rain as Rain
          [Weather].Radn as Radn
          [Weather].MaxT as MaxT
          [Weather].MinT as MinT
          [Soybean].Grain.Wt*10 as Yieldkgha
          [Leaf].FRGR as FracGrowthRate
          [Photosynthesis].FN as NutrientStress
          [Photosynthesis].FT as TempStress
          [Photosynthesis].FW as WaterStress
  DataStore
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