folder simulations: version=37; creator=Apsim 7.10-r4171
  simulation WT
    metfile met: filename=z_12.met
    clock
      start_date = 01/01/2007  # Enter the start date of the simulation
      end_date = 31/12/2007  # Enter the end date of the simulation
    summaryfile
    area paddock
      surfaceom SurfaceOrganicMatter
        PoolName = soybean  # Organic Matter pool name
        type = soybean  # Organic Matter type
        mass = 2000  # Initial surface residue (kg/ha)
        cnr = 20  # C:N ratio of initial residue
        standing_fraction = 0.2  # Fraction of residue standing
      fertiliser
      maize
      soybean
      folder Manager folder
        manager Tillage on fixed date
          # When should tillage be done
          tillage_date = 20-mar  # Enter tillage date (dd-mmm)
          # Tillage application details
          surfaceommodule = SurfaceOrganicMatter  # Module used to apply the tillage
          tillage_type = disc
          tillage_depth = 150  # User_defined depth of seedbed preparation (mm)
          tillage_f_incorp = 0.4  # User_defined fraction of surface residues to incorporate (0-1)
          on start_of_day:
```
         if (today = date('[tillage_date]') then
            if ('[tillage_type]' = 'user_defined') then
                '[surfaceommodule]' tillage type = [tillage_type], f_incorp = [tillage_f_incorp] (), tillage_depth = [tillage_depth]
            else
                '[surfaceommodule]' tillage type = [tillage_type]
            endif
            ready_to_till_pre_sow = 0
            till_day_pre_sow = 0
         endif
```
        manager Fertilise at sowing
          # When should fertiliser be applied
          modulename = maize  # On which module should the event come from
          eventname = sowing  # On which event should fertiliser be applied
          # Fertiliser application details
          fertmodule = fertiliser  # Module used to apply the fertiliser
          fert_amount_sow = 220  # Amount of starter fertiliser at sowing (kg/ha)
          fert_type_sow = urea_N  # Sowing fertiliser type
          on [modulename].[eventname]:
```
        [fertmodule] apply amount = [fert_amount_sow] (kg/ha), depth = 50 (mm), type = [fert_type_sow]
```
        manager Sow on a fixed date
          # Sowing criteria
          date = 1-may  # Enter sowing date (dd-mmm)
          # Sowing parameters
          crop = maize  # Enter name of crop to sow
          density = 3  # Enter sowing density (plants/m2)
          depth = 50  # Enter sowing depth (mm)
          cultivar = B_115  # Enter cultivar
          class = plant  # Enter crop growth class
          row_spacing = 500  # Enter row spacing (mm)
          on start_of_day:
```
        if (today = date('[date]') then
              [crop] sow plants =[density], sowing_depth = [depth], cultivar = [cultivar], row_spacing = [row_spacing], crop_class = [class]
         endif
```
        manager Harvesting rule
          # Harvesting criteria
          crop = maize  # Enter name of crop to harvest when ripe
          on end_of_day:
```
           if ([crop].StageName = 'harvest_ripe' or [crop].plant_status = 'dead') then
              [crop]  harvest
              [crop]  end_crop
           endif
```
        manager Harvesting rule1
          # Harvesting criteria
          crop = soybean  # Enter name of crop to harvest when ripe
          on end_of_day:
          script: same as in WT.paddock.Manager folder.Harvesting rule
        manager Empty manager
          on start_of_day:
```
corn_buac   = maize.yield * 0.0159/0.85  ! corn yield in bushels/acre @15% moisture  
corn_kgha   = maize.yield / 0.85  ! corn yield @15% moisture 
 
soy_buac   = soybean.yield * 0.0149/0.87
soy_kgha   = soybean.yield / 0.87 ! soybeanyield @13% moisture  

oc_20cm = (oc(1) + oc(2))*0.5
oc_40cm = (oc_20cm + oc(3))*0.5
  
n_uptake_kgha = n_total_uptake * 10
bbc_gradient = 1
```
          on end_of_day:
```
root_wt = fom_c() /0.4
root_cn = fom_c() /fom_n()

n_deep = no3() + nh4()

Y = paddock.soybean.yield +  paddock.maize.yield

leaf_num = leaf_no + LeafNo
```
      outputfile: filename=WT.out; title=WT
        variables
          variables: dd/mm/yyyy as Date, year, month, day, StageName, Stage, leaf_num, Y, Rain, Radn, MaxT, MinT, swdef_expan, ll15_dep(), dul_dep(), sw_dep(), sat_dep()
        events My Variables Events
          events: start_simulation, end_day, end_simulation
      Soil 242963: SoilType=242963; Region=Champaign; State=Illinois; Country=USA; ApsoilNumber=1; Latitude=40.12; Longitude=-88.19; YearOfSampling=2019; DataSource=ssurgo2apsim
        Comments=This soil was created with data from SSURGO Database, downloaded in R via the FedData package and parameters set using the approach described by Archontoulis et al. (2014, Agron. J. 106(3):1025-1040). This soil type represents
        Water
          Thickness  BD    AirDry  LL15  DUL   SAT   KS
          50         1.3   0.2     0.22  0.34  0.46  47.28
          50         1.3   0.2     0.22  0.34  0.46  47.28
          50         1.3   0.2     0.22  0.34  0.46  47.28
          50         1.3   0.21    0.22  0.34  0.46  47.28
          200        1.31  0.2     0.21  0.34  0.46  47.12
          200        1.32  0.2     0.2   0.33  0.45  45.45
          200        1.34  0.18    0.18  0.32  0.45  46.62
          200        1.38  0.16    0.16  0.3   0.42  67.41
          500        1.49  0.14    0.14  0.25  0.4   161.08
          500        1.55  0.13    0.13  0.22  0.39  219.03
          500        1.55  0.13    0.13  0.22  0.39  219.03
          SoilCrop maize
            LL=[0.22, 0.22, 0.22, 0.22, 0.21, 0.2, 0.18, 0.16, 0.14, 0.13, 0.13]
            KL=[0.08, 0.08, 0.08, 0.08, 0.073, 0.063, 0.055, 0.048, 0.038, 0.026, 0.019]
            XF=[1, 1, 1, 1, 1, 1, 1, 1, 1, 0.1, 0.1]
          SoilCrop soybean: same as WT.paddock.242963.Water.maize
        SoilWater: SummerCona=4; SummerU=9.05; SummerDate=1-jun; WinterCona=4; WinterU=9.05; WinterDate=1-nov; DiffusConst=40; DiffusSlope=16; Salb=0.15; CN2Bare=78; CNRed=20; CNCov=0.8; Thickness=[50, 50, 50, 50, 200, 200, 200, 200, 500, 500, 500]
          SWCON=[0.327, 0.327, 0.327, 0.327, 0.335, 0.35, 0.363, 0.373, 0.433, 0.48, 0.48]
        SoilOrganicMatter: RootCN=45; RootWt=1000; SoilCN=13; EnrACoeff=7.4; EnrBCoeff=0.2; OCUnits=Total
          Thickness  OC    FBiom   FInert
          50         3.2   0.04    0.4
          50         3.2   0.04    0.4
          50         3.2   0.0363  0.42
          50         3.2   0.0288  0.46
          200        3.17  0.015   0.56
          200        2.6   0.0116  0.72
          200        1.64  0.01    0.8
          200        0.77  0.01    0.8
          500        0.44  0.01    0.82
          500        0.12  0.01    0.98
          500        0     0.01    0.99
        Analysis: PHUnits=Water; BoronUnits=HotWater
          Thickness  PH    ParticleSizeSand  ParticleSizeSilt  ParticleSizeClay
          50         7.62  8                 61                31
          50         7.62  8                 61                31
          50         7.62  8                 61                31
          50         7.62  8                 61                31
          200        7.62  8                 61                31
          200        7.62  8                 61                31
          200        7.66  9.8               59.7              30.5
          200        7.89  21.5              51                27.5
          500        8.31  41.4              36                22.5
          500        8.47  48                31                21
          500        8.47  48                31                21
        Sample Intial conditions: NO3Units=kgha; NH4Units=kgha; SWUnits=Volumetric; OCUnits=Total; PHUnits=Water
          Thickness  NO3   NH4   SW
          50         3.2   1.6   0.34
          50         3.2   1.6   0.34
          50         3.2   1.6   0.34
          50         3.2   1.6   0.34
          200        3.17  1.58  0.34
          200        2.6   1.3   0.33
          200        1.64  0.82  0.32
          200        0.77  0.39  0.3
          500        0.44  0.22  0.25
          500        0.12  0.06  0.22
          500        0     0     0.22
      tracker
        variable=average of water_table on last 7 start_of_day as WeeklyAvgWT
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